# OpenSim document version 40500
IMUInverseKinematicsTool:
  results_directory: ...
  time_range: 0 30
  report_errors: true
  sensor_to_opensim_rotations: 0 0 0
  orientations_file: ...
  OrientationWeightSet orientation_weights:
    OrientationWeight calcn_r: weight=1
    OrientationWeight tibia_r: weight=1
    OrientationWeight femur_r: weight=1
    OrientationWeight calcn_l: weight=1
    OrientationWeight tibia_l: weight=1
    OrientationWeight femur_l: weight=1
    OrientationWeight pelvis: weight=1
    OrientationWeight torso: weight=1
    OrientationWeight humerus_r: weight=1
    OrientationWeight radius_r: weight=0.2
    OrientationWeight hand_r: weight=0.2
    OrientationWeight humerus_l: weight=1
    OrientationWeight radius_l: weight=0.2
    OrientationWeight hand_l: weight=0.2
    OrientationWeight head: weight=1
